*Heading
** Job name: Oring_elpl Model name: Quarter_Oring_elpl
** Generated by: Abaqus/CAE 2020
*Preprint, echo=NO, model=NO, history=NO, contact=NO
**
** PARTS
**
*Part, name=Plane
*Node
      1,           0.,           0.,           0.
      2,  0.200000003,           0.,           0.
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*Element, type=R3D4
 1,  1,  2, 13, 12
 2,  2,  3, 14, 13
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*Node
    100,           0.,           0.,           0.
*Nset, nset=Plane-RefPt_, internal
100,
*Elset, elset=Plane, generate
  1,  80,   1
*End Part
**
*Part, name=Quarter_Oring
*Node
      1,           0.,           1.,           2.
      2,           0.,  0.800000012,           2.
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*Element, type=C3D8R
  1,  79,  80,  86,  85,   1,   2,   8,   7
  2,  80,  81,  87,  86,   2,   3,   9,   8
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*Nset, nset=Set-1, generate
   1,  468,    1
*Elset, elset=Set-1, generate
   1,  300,    1
** Section: elpl
*Solid Section, elset=Set-1, material=elpl
,
*End Part
**
**
** ASSEMBLY
**
*Assembly, name=Assembly
**
*Instance, name=Plane-1, part=Plane
          0.,          2.1,         0.75
          0.,          2.1,         0.75, -1.00000001268805,          2.1,         0.75, 89.9999992730282
*End Instance
**
*Instance, name=Quarter_Oring-1, part=Quarter_Oring
          0.,           0.,          0.5
          0.,           0.,          0.5, -1.00000001268805,           0.,          0.5, 89.9999992730282
*End Instance
**
*Nset, nset=Set-1, instance=Quarter_Oring-1
   1,   2,   3,   4,   5,   6
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*Elset, elset=Set-1, instance=Quarter_Oring-1
   1,   2,   3,   4,   5,  61
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*Nset, nset=Set-2, instance=Quarter_Oring-1
  73,  74,  75,  76,  77,  78
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*Elset, elset=Set-2, instance=Quarter_Oring-1
  56,  57,  58,  59,  60, 116
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*Nset, nset=Set-3, instance=Quarter_Oring-1
 468,
*Nset, nset=Set-4, instance=Plane-1
 100,
*Elset, elset=_m_Surf-1_SNEG, internal, instance=Plane-1, generate
  1,  80,   1
*Surface, type=ELEMENT, name=m_Surf-1
_m_Surf-1_SNEG, SNEG
*Elset, elset=_s_Surf-1_S2, internal, instance=Quarter_Oring-1, generate
  1,  60,   1
*Surface, type=ELEMENT, name=s_Surf-1
_s_Surf-1_S2, S2
*Rigid Body, ref node=Plane-1.Plane-RefPt_, elset=Plane-1.Plane
*End Assembly
**
** MATERIALS
**
*Material, name=elpl
*Elastic
210000., 0.3
*Plastic
 755.,    0.
 785., 0.005
 810.,  0.01
 829.,  0.02
 840.,  0.05
 860.,   0.1
 875.,  0.15
 900.,  0.25
 930.,   0.4
 970.,   0.7
1000.,    1.
1050.,    2.
1080.,    3.
1110.,    4.
**
** INTERACTION PROPERTIES
**
*Surface Interaction, name=IntProp-1
1.,
*Friction, slip tolerance=0.005
 0.1,
**
** INTERACTIONS
**
** Interaction: Int-1
*Contact Pair, interaction=IntProp-1, type=SURFACE TO SURFACE
s_Surf-1, m_Surf-1
** ----------------------------------------------------------------
**
** STEP: Step-1_Load
**
*Step, name=Step-1_Load, nlgeom=NO, inc=100000
*Static
0.1, 100., 1e-05, 1.
**
** BOUNDARY CONDITIONS
**
** Name: BC-1 Type: Symmetry/Antisymmetry/Encastre
*Boundary
Set-1, XSYMM
** Name: BC-2 Type: Symmetry/Antisymmetry/Encastre
*Boundary
Set-2, YSYMM
** Name: BC-3 Type: Displacement/Rotation
*Boundary
Set-3, 2, 2
Set-3, 3, 3
Set-3, 4, 4
Set-3, 5, 5
Set-3, 6, 6
** Name: BC-4 Type: Displacement/Rotation
*Boundary
Set-4, 1, 1
Set-4, 2, 2, -0.25
Set-4, 3, 3
Set-4, 4, 4
Set-4, 5, 5
Set-4, 6, 6
**
** OUTPUT REQUESTS
**
*Restart, write, frequency=0
**
** FIELD OUTPUT: F-Output-1
**
*Output, field, variable=PRESELECT
**
** HISTORY OUTPUT: H-Output-1
**
*Output, history, variable=PRESELECT
*End Step
** ----------------------------------------------------------------
**
** STEP: Step-2_Unload
**
*Step, name=Step-2_Unload, nlgeom=NO, inc=100000
*Static
0.1, 100., 1e-05, 1.
**
** BOUNDARY CONDITIONS
**
** Name: BC-4 Type: Displacement/Rotation
*Boundary
Set-4, 2, 2, 0.25
**
** OUTPUT REQUESTS
**
*Restart, write, frequency=0
**
** FIELD OUTPUT: F-Output-1
**
*Output, field, variable=PRESELECT
**
** HISTORY OUTPUT: H-Output-1
**
*Output, history, variable=PRESELECT
*End Step
