*Heading
** Job name: ori_umat Model name: Quarter_Oring_02-Copy
** Generated by: Abaqus/CAE 2020
*Preprint, echo=NO, model=NO, history=NO, contact=NO
**
** PARTS
**
*Part, name=Part-2
*End Part
**
*Part, name=Quarter_Oring
*Node
      1,           0.,           1.,           2.
      2,           0.,  0.800000012,           2.
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*Element, type=C3D8
  1,  79,  80,  86,  85,   1,   2,   8,   7
  2,  80,  81,  87,  86,   2,   3,   9,   8
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*Nset, nset=Set-1, generate
   1,  468,    1
*Elset, elset=Set-1, generate
   1,  300,    1
** Section: elastic
*Solid Section, elset=Set-1, material=umat
,
*End Part
**
**
** ASSEMBLY
**
*Assembly, name=Assembly
**
*Instance, name=Quarter_Oring-1, part=Quarter_Oring
          0.,           0.,          0.5
          0.,           0.,          0.5, -1.00000001268805,           0.,          0.5, 89.9999992730282
*End Instance
**
*Instance, name=Part-2-1, part=Part-2
          1.,           2.,        -0.75
          1.,           2.,        -0.75,           1., 0.999999987311948,        -0.75, 89.9999992730282
*Node
      1,          1.5,           0.,           1.
*Nset, nset=Part-2-1-RefPt_, internal
1,
*Surface, type=CYLINDER, name=m_Surf-3
START,          1.5,           0.
 LINE,           0.,           0.
*Rigid Body, ref node=Part-2-1-RefPt_, analytical surface=m_Surf-3
*End Instance
**
*Nset, nset=Set-1, instance=Quarter_Oring-1
   1,   2,   3,   4,   5,   6
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*Elset, elset=Set-1, instance=Quarter_Oring-1
   1,   2,   3,   4,   5,  61
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*Nset, nset=Set-2, instance=Quarter_Oring-1
  73,  74,  75,  76,  77,  78
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*Elset, elset=Set-2, instance=Quarter_Oring-1
  56,  57,  58,  59,  60, 116
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*Nset, nset=Set-3, instance=Quarter_Oring-1
 468,
*Nset, nset=Set-7, instance=Part-2-1
 1,
*Nset, nset=Set-8, instance=Part-2-1
 1,
*Nset, nset=s_Set-5, instance=Quarter_Oring-1, generate
  1,  78,   1
*Elset, elset=s_Set-5, instance=Quarter_Oring-1, generate
  1,  60,   1
*Elset, elset=_s_Surf-1_S2, internal, instance=Quarter_Oring-1, generate
  1,  60,   1
*Surface, type=ELEMENT, name=s_Surf-1
_s_Surf-1_S2, S2
*Surface, type=NODE, name=s_Set-5_CNS_, internal
s_Set-5, 1.
*End Assembly
**
** MATERIALS
**
*MATERIAL, name=umat
*DEPVAR
1932
*USER MATERIAL, constants=1
0.,
*USER OUTPUT VARIABLES
30
*Material, name=elastic
*Elastic
210000., 0.3
**
** INTERACTION PROPERTIES
**
*Surface Interaction, name=IntProp-1
1.,
*Friction, slip tolerance=0.005
 0.1,
**
** BOUNDARY CONDITIONS
**
** Name: BC-1 Type: Symmetry/Antisymmetry/Encastre
*Boundary
Set-1, XSYMM
** Name: BC-2 Type: Symmetry/Antisymmetry/Encastre
*Boundary
Set-2, YSYMM
** Name: BC-3 Type: Displacement/Rotation
*Boundary
Set-3, 2, 2
Set-3, 3, 3
Set-3, 4, 4
Set-3, 5, 5
Set-3, 6, 6
**
** INTERACTIONS
**
** Interaction: Int-1
*Contact Pair, interaction=IntProp-1, type=SURFACE TO SURFACE
s_Set-5_CNS_, Part-2-1.m_Surf-3
** ----------------------------------------------------------------
**
** STEP: Step-1_Load
**
*initial conditions, type=solution, user
*Step, name=Step-1_Load, nlgeom=NO, inc=100000
*Static
0.1, 100., 1e-05, 1.
**
** BOUNDARY CONDITIONS
**
** Name: BC-4 Type: Displacement/Rotation
*Boundary
Set-7, 1, 1
Set-7, 3, 3
Set-7, 4, 4
Set-7, 5, 5
Set-7, 6, 6
** Name: BC-5 Type: Velocity/Angular velocity
*Boundary, type=VELOCITY
Set-8, 2, 2, -0.0025
**
** OUTPUT REQUESTS
**
*Restart, write, frequency=0
**
** FIELD OUTPUT: F-Output-1
**
*Output, field, variable=PRESELECT
**
** HISTORY OUTPUT: H-Output-1
**
*Output, history, variable=PRESELECT
*End Step
** ----------------------------------------------------------------
**
** STEP: Step-2_Unload
**
*Step, name=Step-2_Unload, nlgeom=NO, inc=100000
*Static
0.1, 100., 1e-05, 1.
**
** BOUNDARY CONDITIONS
**
** Name: BC-5 Type: Velocity/Angular velocity
*Boundary, type=VELOCITY
Set-8, 2, 2, 0.0025
**
** OUTPUT REQUESTS
**
*Restart, write, frequency=0
**
** FIELD OUTPUT: F-Output-1
**
*Output, field, variable=PRESELECT
**
** HISTORY OUTPUT: H-Output-1
**
*Output, history, variable=PRESELECT
*End Step
